// SBML level 2 version 4

function rep_rate_law(a, p, n, a0)
  a/(1 + p^n) + a0;
end

model Model_1()
  // Repressilator

  // Compartments:
  compartment compartment_1 = 1;

  // Species:
  species m1 in compartment_1 = 1;
  species p1 in compartment_1 = 1;
  species m2 in compartment_1 = 1;
  species p2 in compartment_1 = 1;
  species m3 in compartment_1 = 1;
  species p3 in compartment_1 = 1;

  // Parameters:
  a0 = 0;
  n = 0;
  b = 0;
  a = 0;
  d = 1;

  // Reactions:
  R1: => m1; compartment_1*rep_rate_law(a, p3, n, 0.1*a0);  // modifiers: p3
  R2: => m2; compartment_1*rep_rate_law(a, p1, n, 0.1*a0);  // modifiers: p1
  R3: => m3; compartment_1*rep_rate_law(a, p2, n, 0.1*a0);  // modifiers: p2
  R4: m1 => ; compartment_1*d*m1;
  R5: m2 => ; compartment_1*d*m2;
  R6: m3 => ; compartment_1*d*m3;
  R7: m1 => m1 + p1; compartment_1*b*m1;
  R8: m2 => m2 + p2; compartment_1*0.1*b*m2;
  R9: m3 => m3 + p3; compartment_1*b*m3;
  R10: p1 => ; compartment_1*b*p1;
  R11: p2 => ; compartment_1*0.1*b*p2;
  R12: p3 => ; compartment_1*b*p3;

  // Unit definitions:
  unit volume = 1e-3 litre;
  unit substance = 1e-3 mole;
end
